*Heading
** Job name: 10 Model name: Model-1
** Generated by: Abaqus/CAE 2024
*Preprint, echo=NO, model=NO, history=NO, contact=NO
** ----------------------------------------------------------------
**
*Parameter
** number of viscous mechanisms
**
Gshear = 0.19926
Kbulk  = 0.19926e3
lamL   = 2.04
Amp    = 0.6
nu_s0  = 0.6
nu_ss  = 0.95
dE   = 1.e-2
nSdv = 3
nProps = 7
**
** PART INSTANCE: SENT-1
**
*Node
      1,         250.,  -93.4000015
      2,   117.373077,  -93.4000015
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*Element, type=CPE3
 1, 1170,  789,  715
 2,  874,  819,  816
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*Element, type=CPE4
 10,  277,  280,  354,  447
 11,  285,  103,  104,  286
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*Nset, nset=SENT-1_TOP
   9,  10, 207, 208, 209, 210
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*Elset, elset=SENT-1_TOP
 1280, 1282, 1283, 1285, 1286, 1287
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*Nset, nset=SENT-1_BOT
  4,  5, 65, 66, 67, 68
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*Elset, elset=SENT-1_BOT
  23,  24,  25,  43,  45,  47
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*Nset, nset=SENT-1_ALL, generate
    1,  2357,     1
*Elset, elset=SENT-1_ALL, generate
    1,  2247,     1
** Section: Section-1
*Solid Section, elset=SENT-1_ALL, material=Material-1
,
*System
**
** MATERIALS
**
*Material, name=Material-1
*Density
1.,
*User material,Constants=<nProps>
<Gshear>,<Kbulk>,<lamL>,<Amp>,<nu_s0>,<nu_ss>,<dE>
*Depvar
<nSdv>
1,   LambdaBar, LambdaBar
2,   nu_local, nu_local
3,   Achainmax, Achainmax
**
** BOUNDARY CONDITIONS
**
** Name: BOT_Fixed Type: Symmetry/Antisymmetry/Encastre
*Boundary
SENT-1_BOT, ENCASTRE
** Name: Temperature Type: Temperature
** ----------------------------------------------------------------
**
** STEP: Load1
**
*Step, name=Load1, nlgeom=YES, inc = 100000
*static
0.1, 10., 1.e-9, 10.
**
** BOUNDARY CONDITIONS
**
** Name: TOP_Load Type: Displacement/Rotation
*Boundary
SENT-1_TOP, 2, 2, 150.
**
** OUTPUT REQUESTS
**
*Restart, write, frequency=0
**
** FIELD OUTPUT: F-Output-1
**
*Output, field, number interval=10
*Node Output
NT, U
*Element Output, directions=YES
LE, S, SDV
**
** HISTORY OUTPUT: H-Output-1
**
*Output, history, number interval=25
*Node Output, nset=SENT-1_BOT
RF2,
*Node Output, nset=SENT-1_TOP
U2,
*End Step
** ----------------------------------------------------------------
**
** STEP: Unload1
**
*Step, name=Unload1, nlgeom=YES, inc = 100000
*static
0.1, 10., 1.e-9, 10.
**
** BOUNDARY CONDITIONS
**
** Name: TOP_Unload Type: Displacement/Rotation
*Boundary
SENT-1_TOP, 2, 2
**
** OUTPUT REQUESTS
**
*Restart, write, frequency=0
**
** FIELD OUTPUT: F-Output-1
**
*Output, field, number interval=10
*Node Output
NT, U
*Element Output, directions=YES
LE, S, SDV
**
** HISTORY OUTPUT: H-Output-1
**
*Output, history, number interval=25
*Node Output, nset=SENT-1_BOT
RF2,
*Node Output, nset=SENT-1_TOP
U2,
*End Step
** ----------------------------------------------------------------
**
** STEP: Reload1
**
*Step, name=Reload1, nlgeom=YES, inc = 100000
*static
0.1, 10., 1.e-9, 10.
**
** BOUNDARY CONDITIONS
**
** Name: TOP_Reload Type: Displacement/Rotation
*Boundary
SENT-1_TOP, 2, 2, 250.
**
** OUTPUT REQUESTS
**
*Restart, write, frequency=0
**
** FIELD OUTPUT: F-Output-1
**
*Output, field, number interval=10
*Node Output
NT, U
*Element Output, directions=YES
LE, S, SDV
**
** HISTORY OUTPUT: H-Output-1
**
*Output, history, number interval=25
*Node Output, nset=SENT-1_BOT
RF2,
*Node Output, nset=SENT-1_TOP
U2,
*End Step
** ----------------------------------------------------------------
**
** STEP: Unload2
**
*Step, name=Unload2, nlgeom=YES, inc = 100000
*static
0.1, 10., 1.e-9, 10.
**
** BOUNDARY CONDITIONS
**
** Name: TOP_Unload Type: Displacement/Rotation
*Boundary
SENT-1_TOP, 2, 2
**
** OUTPUT REQUESTS
**
*Restart, write, frequency=0
**
** FIELD OUTPUT: F-Output-1
**
*Output, field, number interval=10
*Node Output
NT, U
*Element Output, directions=YES
LE, S, SDV
**
** HISTORY OUTPUT: H-Output-1
**
*Output, history, number interval=25
*Node Output, nset=SENT-1_BOT
RF2,
*Node Output, nset=SENT-1_TOP
U2,
*End Step
** ----------------------------------------------------------------
**
** STEP: Reload2
**
*Step, name=Reload2, nlgeom=YES, inc = 100000
*static
0.1, 10., 1.e-9, 10.
**
** BOUNDARY CONDITIONS
**
** Name: TOP_Load Type: Displacement/Rotation
*Boundary
SENT-1_TOP, 2, 2, 350.
**
** OUTPUT REQUESTS
**
*Restart, write, frequency=0
**
** FIELD OUTPUT: F-Output-1
**
*Output, field, number interval=10
*Node Output
NT, U
*Element Output, directions=YES
LE, S, SDV
**
** HISTORY OUTPUT: H-Output-1
**
*Output, history, number interval=25
*Node Output, nset=SENT-1_BOT
RF2,
*Node Output, nset=SENT-1_TOP
U2,
*End Step
** ----------------------------------------------------------------
**
** STEP: Unload3
**
*Step, name=Unload3, nlgeom=YES, inc = 100000
*static
0.1, 10., 1.e-9, 10.
**
** BOUNDARY CONDITIONS
**
** Name: TOP_Unload Type: Displacement/Rotation
*Boundary
SENT-1_TOP, 2, 2
**
** OUTPUT REQUESTS
**
*Restart, write, frequency=0
**
** FIELD OUTPUT: F-Output-1
**
*Output, field, number interval=10
*Node Output
NT, U
*Element Output, directions=YES
LE, S, SDV
**
** HISTORY OUTPUT: H-Output-1
**
*Output, history, number interval=25
*Node Output, nset=SENT-1_BOT
RF2,
*Node Output, nset=SENT-1_TOP
U2,
*End Step
** ----------------------------------------------------------------
