*Heading
** Job name: 2_5 Model name: Model-1
** Generated by: Abaqus/CAE 2024
*Preprint, echo=NO, model=NO, history=NO, contact=NO
** ----------------------------------------------------------------
**
*Parameter
**
lc = 0.2
CP = 1.e0
**
Gshear = 0.19926
Kbulk  = 0.19926e3
lamL   = 2.04
Amp    = 0.6
nu_s0  = 0.6
nu_ss  = 0.95
dE   = 1.e-2
**
nSdv = 5
nProps = 7
**
** PART INSTANCE: SENT-1
**
*Node
      1,         250.,  -93.4000015
      2,   117.373077,  -93.4000015
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*Element, type=CPE3T
 1, 1840,  677, 1839
 2, 1775, 1765,  620
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*Element, type=CPE4T
  50, 1896,   12,   13,  771
  51, 1010, 1035,  163,  164
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*Nset, nset=SENT-1_TOP
   9,  10, 406, 407, 408, 409
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*Elset, elset=SENT-1_TOP
 5810, 5811, 5812, 5813, 5906, 5907
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*Nset, nset=SENT-1_BOT
   4,   5, 106, 107, 108, 109
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*Elset, elset=SENT-1_BOT
  72,  73, 148, 150, 258, 266
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*Nset, nset=SENT-1_ALL, generate
    1,  7672,     1
*Elset, elset=SENT-1_ALL, generate
    1,  7594,     1
** Section: Section-1
*Solid Section, elset=SENT-1_ALL, material=Material-1
,
*System
**
** MATERIALS
**
*Material, name=Material-1
*Density
1.e-2,
*User material,Constants=<nProps>
<Gshear>,<Kbulk>,<lamL>,<Amp>,<nu_s0>,<nu_ss>,<dE>
*User material, type=thermal, constants=2
<lc>,<CP>
*Depvar
<nSdv>
1,   LambdaBar, LambdaBar
2,   nu_nonlocal, nu_nonlocal
3,   Achainmax, Achainmax
4,   numax, numax
5,   nu_local, nu_local
**
** BOUNDARY CONDITIONS
**
** Name: BOT_Fixed Type: Symmetry/Antisymmetry/Encastre
*Boundary
SENT-1_BOT, ENCASTRE
** Name: Temperature Type: Temperature
*********************************************************************
**                 INITIAL CONDITIONS, MODEL DATA
*********************************************************************
*Initial Conditions, type=TEMPERATURE
SENT-1_ALL, <nu_s0>
** ----------------------------------------------------------------
**
** STEP: Load1
**
*Step, name=Load1, nlgeom=YES, inc = 100000
*Coupled Temperature-displacement, creep=none, deltmx=1.
0.1, 10., 1.e-9, 10.
**
*CONTROLS, PARAMETERS=TIME INCREMENTATION
, , , , , , ,20 , , ,
*SOLUTION TECHNIQUE, TYPE = SEPARATED
**
** BOUNDARY CONDITIONS
**
** Name: TOP_Load Type: Displacement/Rotation
*Boundary
SENT-1_TOP, 2, 2, 150.
**
** OUTPUT REQUESTS
**
*Restart, write, frequency=0
**
** FIELD OUTPUT: F-Output-1
**
*Output, field, number interval=10
*Node Output
NT, U
*Element Output, directions=YES
LE, S, SDV
**
** HISTORY OUTPUT: H-Output-1
**
*Output, history, number interval=25
*Node Output, nset=SENT-1_BOT
RF2,
*End Step
** ----------------------------------------------------------------
**
** STEP: Unload1
**
*Step, name=Unload1, nlgeom=YES, inc = 100000
*Coupled Temperature-displacement, creep=none, deltmx=1.
0.1, 10., 1.e-9, 10.
**
*CONTROLS, PARAMETERS=TIME INCREMENTATION
, , , , , , ,20 , , ,
*SOLUTION TECHNIQUE, TYPE = SEPARATED
**
** BOUNDARY CONDITIONS
**
** Name: TOP_Unload Type: Displacement/Rotation
*Boundary
SENT-1_TOP, 2, 2
**
** OUTPUT REQUESTS
**
*Restart, write, frequency=0
**
** FIELD OUTPUT: F-Output-1
**
*Output, field, number interval=10
*Node Output
NT, U
*Element Output, directions=YES
LE, S, SDV
**
** HISTORY OUTPUT: H-Output-1
**
*Output, history, number interval=25
*Node Output, nset=SENT-1_BOT
RF2,
*End Step
** ----------------------------------------------------------------
**
** STEP: Reload1
**
*Step, name=Reload1, nlgeom=YES, inc = 100000
*Coupled Temperature-displacement, creep=none, deltmx=1.
0.1, 10., 1.e-9, 10.
**
*CONTROLS, PARAMETERS=TIME INCREMENTATION
, , , , , , ,20 , , ,
*SOLUTION TECHNIQUE, TYPE = SEPARATED
**
** BOUNDARY CONDITIONS
**
** Name: TOP_Reload Type: Displacement/Rotation
*Boundary
SENT-1_TOP, 2, 2, 250.
**
** OUTPUT REQUESTS
**
*Restart, write, frequency=0
**
** FIELD OUTPUT: F-Output-1
**
*Output, field, number interval=10
*Node Output
NT, U
*Element Output, directions=YES
LE, S, SDV
**
** HISTORY OUTPUT: H-Output-1
**
*Output, history, number interval=25
*Node Output, nset=SENT-1_BOT
RF2,
*End Step
** ----------------------------------------------------------------
**
** STEP: Unload2
**
*Step, name=Unload2, nlgeom=YES, inc = 100000
*Coupled Temperature-displacement, creep=none, deltmx=1.
0.1, 10., 1.e-9, 10.
**
*CONTROLS, PARAMETERS=TIME INCREMENTATION
, , , , , , ,20 , , ,
*SOLUTION TECHNIQUE, TYPE = SEPARATED
**
** BOUNDARY CONDITIONS
**
** Name: TOP_Unload Type: Displacement/Rotation
*Boundary
SENT-1_TOP, 2, 2
**
** OUTPUT REQUESTS
**
*Restart, write, frequency=0
**
** FIELD OUTPUT: F-Output-1
**
*Output, field, number interval=10
*Node Output
NT, U
*Element Output, directions=YES
LE, S, SDV
**
** HISTORY OUTPUT: H-Output-1
**
*Output, history, number interval=25
*Node Output, nset=SENT-1_BOT
RF2,
*End Step
** ----------------------------------------------------------------
**
** STEP: Reload2
**
*Step, name=Reload2, nlgeom=YES, inc = 100000
*Coupled Temperature-displacement, creep=none, deltmx=1.
0.1, 10., 1.e-9, 10.
**
*CONTROLS, PARAMETERS=TIME INCREMENTATION
, , , , , , ,20 , , ,
*SOLUTION TECHNIQUE, TYPE = SEPARATED
**
** BOUNDARY CONDITIONS
**
** Name: TOP_Load Type: Displacement/Rotation
*Boundary
SENT-1_TOP, 2, 2, 350.
**
** OUTPUT REQUESTS
**
*Restart, write, frequency=0
**
** FIELD OUTPUT: F-Output-1
**
*Output, field, number interval=10
*Node Output
NT, U
*Element Output, directions=YES
LE, S, SDV
**
** HISTORY OUTPUT: H-Output-1
**
*Output, history, number interval=25
*Node Output, nset=SENT-1_BOT
RF2,
*End Step
** ----------------------------------------------------------------
**
** STEP: Unload3
**
*Step, name=Unload3, nlgeom=YES, inc = 100000
*Coupled Temperature-displacement, creep=none, deltmx=1.
0.1, 10., 1.e-9, 10.
**
*CONTROLS, PARAMETERS=TIME INCREMENTATION
, , , , , , ,20 , , ,
*SOLUTION TECHNIQUE, TYPE = SEPARATED
**
** BOUNDARY CONDITIONS
**
** Name: TOP_Unload Type: Displacement/Rotation
*Boundary
SENT-1_TOP, 2, 2
**
** OUTPUT REQUESTS
**
*Restart, write, frequency=0
**
** FIELD OUTPUT: F-Output-1
**
*Output, field, number interval=10
*Node Output
NT, U
*Element Output, directions=YES
LE, S, SDV
**
** HISTORY OUTPUT: H-Output-1
**
*Output, history, number interval=25
*Node Output, nset=SENT-1_BOT
RF2,
*End Step
** ----------------------------------------------------------------
